# Мы составили манипулятор на основании совокупности наших технических возможностей и требований к роботу и по рабочей области и степени подвижности манипулятора.
# Для того чтобы спроектировать приводы основных (плечевой и локтевой) подвижностей
# манипулятора, нам надо рассчитать мощность двигателей.
# Мощность будем считать, исходя из момента, уже затем выбирая конкретную модель
# двигателя и возможно проектируя редуктор.
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# Конструкционно робот можно разделить на три части:
# 1) Плечо
# 2) Локоть
# 3) Схват + Нагрузка
# В силу модульности конструкции захватное устройство и нагрузка рассматриваются абстрактно
# с запасом по массе. Конфигурация и реализация захватного устройства может изменяться.
# Схват + Нагрузка
# Масса сервопривода (MG996R) в простом пластиковом корпусе около 0,4 кг. Таких используется не более трёх.
m_серв := 0.2  # кг
# Масса захватного устройства ( MG995 ) до 100 г с мотором.
m_захв := 0.2  # кг
# Допустим масса нагрузки до 1 кг
m_груз := 1  # кг
# Тогда масса гриппера будет:
m_грип := 3*m_серв + m_захв + m_груз
m_грип = 1.8  # кг
# Локоть
# Масса локтя (в неё не входит двигатель, даже если он расположен в сочленении) составляет:
m_cubit := 1.4  # кг  # Согласно модели, собранной с учётом материалов.
# Длина локтя от оси вращения до конечной точки составляет:
L_cubit := 0.5  # м  # Добавим 15 см до условного центра масс схвата:
L_cubit_plus := L_cubit + 0.15
L_cubit_plus = 0.65  # м
# Центр масс локтя (без гриппера):
r_m_cubit := 0.12  # м
# Совместим локоть и схват:
r_cg := (m_грип*L_cubit_plus + m_cubit*r_m_cubit)/(m_cubit + m_грип)
r_cg = 0.418125  # м
m_cg := m_грип + m_cubit
m_cg = 3.2  # кг
# Плечо
# Если идти с конца плеча, то первым делом нас встречает двигатель привода локтя. Из полученных данных о локте+схвате надо выбрать двигатель.
# С учётом его параметров провести расчёты, после чего уточнить требования к нему и пересчитать. То есть выбор двигтаеля производится итерационно.
# Пусть ускорение будет:
ε_max := 5  # рад/с^2
# Его нужно выбирать таким, чтобы оно обеспечивало отработку дифференциальной компоненты регулятора тока.
J_cubit := m_cg*r_cg^2
J_cubit = 0.559451  # кг*м:2
τ_cubit_approx := J_cubit*ε_max + m_cg*9.81*r_cg
τ_cubit_approx = 15.923  # Н*м
k_safe_cubit_torque := 1.5
τ_cubit_req := τ_cubit_approx*k_safe_cubit_torque
τ_cubit_req = 23.8846  # Н*м
# По моменту подходит мотор-редуктор 60PG60S [ https://market.yandex.ru/cc/7m2pLf ] или [https://aliexpress.ru/item/1005008871093621.html?sku_id=12000047030977298] с крутящим моментом до 400 кг*см = 39,2 Н*м
# Вес этого мотор-редуктора 1.6 кг, но с учётом установки энкодера и веса крпеления.возьмём его как 2 кг.
m_motor := 2  # кг
# Установим мотор прямо на оси (условно) для простоты вычислений.
r_mot := 0.6  # м
# Само плечо имеем массу:
m_shoulder := 2.1  # кг
# И центр масс:
r_shoulder := 0.3  # м
# Совместим плечо и двигаетль:
m_sh_mot := m_shoulder + m_motor
m_sh_mot = 4.1  # кг
r_sh_mot := (m_motor*r_mot + m_shoulder*r_shoulder)/(m_shoulder + m_motor)
r_sh_mot = 0.446341  # м
J_sh_mot := m_sh_mot*r_sh_mot^2
J_sh_mot = 0.816805  # кг*м:2
τ_sh_mot_approx := J_sh_mot*ε_max + m_sh_mot*9.81*r_sh_mot
τ_sh_mot_approx = 22.0363  # Н*м
# Также учтём момент относительно оси плеча от массы нагруженного локтя, двигающегося со совим максимальным ускорением из вытяннутого положения.
a_cubit := ε_max*r_cg
a_cubit = 2.09063  # м/с^2
F_cubit := (a_cubit + 9.81)*m_cg
F_cubit = 38.082  # Н
τ_cubit_shoulder := F_cubit*(r_cg + r_sh_mot)
τ_cubit_shoulder = 32.9206  # Н*м
k_safe_shoulder := 1.5
τ_sh_req := (τ_sh_mot_approx + τ_cubit_shoulder)*k_safe_shoulder
τ_sh_req = 82.4354  # Н*м
# Двигателя с таким моментом нет, однако можно выбрать исполнение 60PG60S  с низким моментом и спроектировать свой планетарный редуктор.
